# OpenSim document version 40000
XsensDataReaderSettings:
  trial_prefix: MT_012006CC-001-000
  ExperimentalSensors:
    ExperimentalSensor _00B42D44: name_in_model=torso_imu
    ExperimentalSensor _00B42DA3: name_in_model=pelvis_imu
    ExperimentalSensor _00B42DAE: name_in_model=tibia_r_imu
    ExperimentalSensor _00B42DA2: name_in_model=femur_r_imu
    ExperimentalSensor _00B42D53: name_in_model=tibia_l_imu
    ExperimentalSensor _00B42D4D: name_in_model=femur_l_imu
    ExperimentalSensor _00B42D48: name_in_model=calcn_r_imu
    ExperimentalSensor _00B42D51: name_in_model=calcn_l_imu
    ExperimentalSensor _00B42D32: name_in_model=humerus_r_imu
    ExperimentalSensor _00B42D4F: name_in_model=radius_r_imu
    ExperimentalSensor _00B42D56: name_in_model=humerus_l_imu
    ExperimentalSensor _00B42D46: name_in_model=radius_l_imu
    ExperimentalSensor _00B42D4B: name_in_model=head_imu
    ExperimentalSensor _00B42D55: name_in_model=hand_r_imu
    ExperimentalSensor _00B42B48: name_in_model=hand_l_imu
