# OpenSim document version 40000
Model 3DGaitModel2392-scaled:
  gravity: 0 -9.80665 0
  length_units: millimeters
  force_units: N
  credits:
    Delp S.L., Loan J.P., Hoy M.G., Zajac F.E., Topp E.L., Rosen J.M., Thelen D.G., Anderson F.C., Seth A. Notes: 3D, 23 DOF gait model created by D.G. Thelen, Univ. of Wisconsin-Madison, and Ajay Seth, Frank C. Anderson, and Scott L. Delp, Stanford University. Lower extremity joint defintions based on Delp et al. (1990). Low back joint and anthropometry based on Anderson and Pandy (1999, 2001). Planar knee model of Yamaguchi and Zajac (1989). Seth replaced tibia translation constraints with a CustomJoint for the knee and removed the patella to eliminate all kinematic constraints; insertions of the quadrucepts are handled with moving points in the tibia frame as defined by Delp 1990. License: Creative Commons (CCBY 3.0). You are free to distribute, remix, tweak, and build upon this work, even commercially, as long as you credit us for the original creation. http://creativecommons.org/licenses/by/3.0/ More Information: http://simtk-confluence.stanford.edu:8080/display/OpenSim/Gait+2392+and+2354+Models
  publications:
    Delp, S.L., Loan, J.P., Hoy, M.G., Zajac, F.E., Topp E.L., Rosen, J.M.: An interactive graphics-based model of the lower extremity to study orthopaedic surgical procedures, IEEE Transactions on Biomedical Engineering, vol. 37, pp. 757-767, 1990. Yamaguchi G.T., Zajac F.E.: A planar model of the knee joint to characterize the knee extensor mechanism." J . Biomecl7. vol. 21. pp. 1-10. 1989. Anderson F.C., Pandy M.G.: A dynamic optimization solution for vertical jumping in three dimensions. Computer Methods in Biomechanics and Biomedical Engineering 2:201-231, 1999. Anderson F.C., Pandy M.G.: Dynamic optimization of human walking. Journal of Biomechanical Engineering 123:381-390, 2001.
  Ground: meshes=treadmill.vtp
  BodySet:
    Body pelvis: mass=11.37429 [kg] mass_center=(-0.07583802 0 0) inertia=(0.1142399 0.09679275 0.06434329 0 0 0)
        meshes=(sacrum.vtp pelvis.vtp l_pelvis.vtp)
      PhysicalOffsetFrame pelvis_imu: socket_parent=.. translation=(-0.07583802 0 0) [meters]
          orientation=(-1.552088 0.269938 -2.981695) [radians]
        Brick pelvis_imu_geom_1: half_lengths=(0.02 0.01 0.005)
    Body femur_r: mass=10.29651 mass_center=(0 -0.190839 0) inertia=(0.1867922 0.04896494 0.1969758 0 0 0)
        meshes=femur_r.vtp
      PhysicalOffsetFrame femur_r_imu: socket_parent=.. translation=(0 -0.190839 0)
          orientation=(-1.518409 -0.1261229 -2.708507)
        Brick femur_r_imu_geom_1: half_lengths=(0.02 0.01 0.005)
    Body tibia_r: mass=3.202044 mass_center=(0 -0.1929438 0) inertia=(0.04648895 0.004704239 0.04713463 0 0 0)
        meshes=(tibia_r.vtp fibula.vtp)
      PhysicalOffsetFrame tibia_r_imu: socket_parent=.. translation=(0 -0.1929438 0)
          orientation=(-1.498624 -0.02160639 -3.069395)
        Brick tibia_r_imu_geom_1: half_lengths=(0.02 0.01 0.005)
    Body talus_r: mass=0.09423153 mass_center=(0 0 0) inertia=(0.001066603 0.001066603 0.001066603 0 0 0)
        meshes=talus.vtp
    Body calcn_r: mass=1.177894 mass_center=(0.1063906 0.03191717 0) inertia=(0.001493244 0.00415975 0.004373071 0 0 0)
        meshes=foot.vtp
      PhysicalOffsetFrame calcn_r_imu: socket_parent=.. translation=(0.1063906 0.03191717 0)
          orientation=(-1.546279 0.0189467 2.627848)
        Brick calcn_r_imu_geom_1: half_lengths=(0.02 0.01 0.005)
    Body toes_r: mass=0.2041055 mass_center=(0.03681114 0.006383435 -0.01861835)
        inertia=(0.0001066603 0.0002133205 0.0001066603 0 0 0) meshes=bofoot.vtp
    Body femur_l: mass=10.29651 mass_center=(0 -0.190839 0) inertia=(0.1867922 0.04896494 0.1969758 0 0 0)
        meshes=femur_l.vtp
      PhysicalOffsetFrame femur_l_imu: socket_parent=.. translation=(0 -0.190839 0)
          orientation=(-1.646163 -0.1868652 -2.584027)
        Brick femur_l_imu_geom_1: half_lengths=(0.02 0.01 0.005)
    Body tibia_l: mass=3.202044 mass_center=(0 -0.1929438 0) inertia=(0.04648895 0.004704239 0.04713463 0 0 0)
        meshes=(tibia_l.vtp l_fibula.vtp)
      PhysicalOffsetFrame tibia_l_imu: socket_parent=.. translation=(0 -0.1929438 0)
          orientation=(-1.61988 -0.01339036 1.514483)
        Brick tibia_l_imu_geom_1: half_lengths=(0.02 0.01 0.005)
    Body talus_l: mass=0.09423153 mass_center=(0 0 0) inertia=(0.001066603 0.001066603 0.001066603 0 0 0)
        meshes=l_talus.vtp
    Body calcn_l: mass=1.177894 mass_center=(0.1063906 0.03191717 0) inertia=(0.001493244 0.00415975 0.004373071 0 0 0)
        meshes=l_foot.vtp
      PhysicalOffsetFrame calcn_l_imu: socket_parent=.. translation=(0.1063906 0.03191717 0)
          orientation=(-1.583271 -0.01029652 2.514377)
        Brick calcn_l_imu_geom_1: half_lengths=(0.02 0.01 0.005)
    Body toes_l: mass=0.2041055 mass_center=(0.03681114 0.006383435 0.01861835)
        inertia=(0.0001066603 0.0002133205 0.0001066603 0 0 0) meshes=l_bofoot.vtp
    Body torso: mass=33.98609 mass_center=(-0.032476 0.3464107 0) inertia=(1.715292 0.8788761 1.665153 0 0 0)
        meshes=(hat_spine.vtp hat_ribs_scap.vtp)
    Body head: mass=5.199437 mass_center=(0 0.1306587 0) inertia=(0.0001101149 0.0001101149 0.0001101149 0 0 0)
        meshes=(skull.vtp jaw.vtp)
      PhysicalOffsetFrame head_imu: socket_parent=.. translation=(0 0.1306587 0)
          orientation=(-1.584684 -0.1243476 -2.750687)
        Brick head_imu_geom_1: half_lengths=(0.02 0.01 0.005)
    Body humerus_r: mass=2.241329 mass_center=(0 -0.184431 0) inertia=(0.01655858 0.005712197 0.01858647 0 0 0)
        meshes=humerus_rv.vtp
      PhysicalOffsetFrame humerus_r_imu: socket_parent=.. translation=(0 -0.184431 0)
          orientation=(-1.409654 -0.2039326 1.275999)
        Brick humerus_r_imu_geom_1: half_lengths=(0.02 0.01 0.005)
    Body ulna_r: mass=0.544074 mass_center=(0 -0.126072 0) inertia=(0.002902553 0.0006055967 0.003148515 0 0 0)
        meshes=ulna_rv.vtp
    Body radius_r: mass=0.544074 mass_center=(0 -0.126072 0) inertia=(0.002902553 0.0006055967 0.003148515 0 0 0)
        meshes=radius_rv.vtp
      PhysicalOffsetFrame radius_r_imu: socket_parent=.. translation=(0 -0.126072 0)
          orientation=(-1.52335 -0.1404092 -1.051315)
        Brick radius_r_imu_geom_1: half_lengths=(0.02 0.01 0.005)
    Body hand_r: mass=0.4097348 mass_center=(0 -0.07122901 0) inertia=(0.0008740976 0.0005360217 0.001313106 0 0 0)
        meshes=(pisiform_rvs.vtp lunate_rvs.vtp scaphoid_rvs.vtp triquetrum_rvs.vtp hamate_rvs.vtp capitate_rvs.vtp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)
    Body humerus_l: mass=2.241329 mass_center=(0 -0.184431 0) inertia=(0.01655858 0.005712197 0.01858647 0 0 0)
        meshes=humerus_lv.vtp
      PhysicalOffsetFrame humerus_l_imu: socket_parent=.. translation=(0 -0.184431 0)
          orientation=(-1.744946 -0.1730157 -2.97213)
        Brick humerus_l_imu_geom_1: half_lengths=(0.02 0.01 0.005)
    Body ulna_l: mass=0.544074 mass_center=(0 -0.126072 0) inertia=(0.002902553 0.0006055967 0.003148515 0 0 0)
        meshes=ulna_lv.vtp
    Body radius_l: mass=0.544074 mass_center=(0 -0.126072 0) inertia=(0.002902553 0.0006055967 0.003148515 0 0 0)
        meshes=radius_lv.vtp
      PhysicalOffsetFrame radius_l_imu: socket_parent=.. translation=(0 -0.126072 0)
          orientation=(-1.622296 -0.1358219 -1.355956)
        Brick radius_l_imu_geom_1: half_lengths=(0.02 0.01 0.005)
    Body hand_l: mass=0.4097348 mass_center=(0 -0.07122901 0) inertia=(0.0008740976 0.0005360217 0.001313106 0 0 0)
        meshes=(pisiform_lvs.vtp lunate_lvs.vtp scaphoid_lvs.vtp triquetrum_lvs.vtp hamate_lvs.vtp capitate_lvs.vtp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)
  JointSet:
    CustomJoint ground_pelvis: socket_parent_frame=ground_offset socket_child_frame=pelvis_offset
      Coordinate pelvis_tilt: default_value=-0.03742495 range=(-1.570796 1.570796) clamped=false
      Coordinate pelvis_list: default_value=-0.2620782 range=(-1.570796 1.570796) clamped=false
      Coordinate pelvis_rotation: default_value=-1.614575 range=(-1.570796 1.570796) clamped=false
      Coordinate pelvis_tx: default_value=0.2341367 range=(-5 5) clamped=false
      Coordinate pelvis_ty: default_value=0.04326292 range=(-1 2) clamped=false
      Coordinate pelvis_tz: default_value=-1.326685 range=(-3 3) clamped=false
      PhysicalOffsetFrame ground_offset: socket_parent=/ground translation=(0 1 0)
      PhysicalOffsetFrame pelvis_offset: socket_parent=/bodyset/pelvis translation=(0 0 0)
      SpatialTransform:
        TransformAxis rotation1: coordinates=pelvis_tilt axis=(0 0 1) LinearFunction(coefficients=1 0)
        TransformAxis rotation2: coordinates=pelvis_list axis=(1 0 0) LinearFunction(coefficients=1 0)
        TransformAxis rotation3: coordinates=pelvis_rotation axis=(0 1 0) LinearFunction(coefficients=1 0)
        TransformAxis translation1: coordinates=pelvis_tx axis=(1 0 0) LinearFunction(coefficients=1 0)
        TransformAxis translation2: coordinates=pelvis_ty axis=(0 1 0) LinearFunction(coefficients=1 0)
        TransformAxis translation3: coordinates=pelvis_tz axis=(0 0 1) LinearFunction(coefficients=1 0)
    CustomJoint hip_r: socket_parent_frame=pelvis_offset socket_child_frame=femur_r_offset
      Coordinate hip_flexion_r: default_value=-0.3939413 range=(-2.094395 2.094395) clamped=false
      Coordinate hip_adduction_r: default_value=-0.02778523 range=(-2.094395 2.094395) clamped=false
      Coordinate hip_rotation_r: default_value=-0.05657412 range=(-2.094395 2.094395) clamped=false
      PhysicalOffsetFrame pelvis_offset: socket_parent=/bodyset/pelvis translation=(-0.07583802 -0.07090373 0.08956825)
      PhysicalOffsetFrame femur_r_offset: socket_parent=/bodyset/femur_r translation=(0 0 0)
      SpatialTransform: axes_held_at_zero=(translation1 translation2 translation3)
        TransformAxis rotation1: coordinates=hip_flexion_r axis=(0 0 1) LinearFunction(coefficients=1 0)
        TransformAxis rotation2: coordinates=hip_adduction_r axis=(1 0 0) LinearFunction(coefficients=1 0)
        TransformAxis rotation3: coordinates=hip_rotation_r axis=(0 1 0) LinearFunction(coefficients=1 0)
    CustomJoint knee_r: socket_parent_frame=femur_r_offset socket_child_frame=tibia_r_offset
      Coordinate knee_angle_r: default_value=0.1029668 range=(-2.094395 0.1745329) clamped=false
      PhysicalOffsetFrame femur_r_offset: socket_parent=/bodyset/femur_r translation=(0 0 0)
      PhysicalOffsetFrame tibia_r_offset: socket_parent=/bodyset/tibia_r translation=(0 0 0)
      SpatialTransform: axes_held_at_zero=(rotation2 rotation3 translation3)
        TransformAxis rotation1: coordinates=knee_angle_r axis=(0 0 1) LinearFunction(coefficients=1 0)
        TransformAxis translation1: coordinates=knee_angle_r axis=(1 0 0)
          MultiplierFunction: scale=1.122583
            SimmSpline: x=(-2.0944 -1.74533 -1.39626 -1.0472 -0.698132 -0.349066 -0.174533 0.197344 0.337395 0.490178 1.52146 2.0944)
                y=(-0.0032 0.00179 0.00411 0.0041 0.00212 -0.001 -0.0031 -0.005227 -0.005435 -0.005574 -0.005435 -0.00525)
        TransformAxis translation2: coordinates=knee_angle_r axis=(0 1 0)
          MultiplierFunction: scale=1.122583
            SimmSpline: x=(-2.0944 -1.22173 -0.523599 -0.349066 -0.174533 0.159149 2.0944)
                y=(-0.4226 -0.4082 -0.399 -0.3976 -0.3966 -0.395264 -0.396)
    CustomJoint ankle_r: socket_parent_frame=tibia_r_offset socket_child_frame=talus_r_offset
      Coordinate ankle_angle_r: default_value=0.04279517 range=(-1.570796 1.570796) clamped=false
      PhysicalOffsetFrame tibia_r_offset: socket_parent=/bodyset/tibia_r translation=(0 -0.4443805 0)
      PhysicalOffsetFrame talus_r_offset: socket_parent=/bodyset/talus_r translation=(0 0 0)
      SpatialTransform: axes_held_at_zero=(rotation2 rotation3 translation1 translation2 translation3)
        TransformAxis rotation1: coordinates=ankle_angle_r axis=(-0.1050135 -0.1740224 0.9791263)
            LinearFunction(coefficients=1 0)
    CustomJoint subtalar_r: socket_parent_frame=talus_r_offset socket_child_frame=calcn_r_offset
      Coordinate subtalar_angle_r: default_value=0.03469666 range=(-1.570796 1.570796) clamped=false
      PhysicalOffsetFrame talus_r_offset: socket_parent=/bodyset/talus_r
          translation=(-0.05188669 -0.04463085 0.008426134)
      PhysicalOffsetFrame calcn_r_offset: socket_parent=/bodyset/calcn_r translation=(0 0 0)
      SpatialTransform: axes_held_at_zero=(rotation2 rotation3 translation1 translation2 translation3)
        TransformAxis rotation1: coordinates=subtalar_angle_r axis=(0.7871796 0.6047475 -0.1209495)
            LinearFunction(coefficients=1 0)
    CustomJoint mtp_r: socket_parent_frame=calcn_r_offset socket_child_frame=toes_r_offset
      Coordinate mtp_angle_r: default_value=0 range=(-1.570796 1.570796) clamped=false
      PhysicalOffsetFrame calcn_r_offset: socket_parent=/bodyset/calcn_r
          translation=(0.1902264 -0.002127812 0.001149018)
      PhysicalOffsetFrame toes_r_offset: socket_parent=/bodyset/toes_r translation=(0 0 0)
      SpatialTransform: axes_held_at_zero=(rotation2 rotation3 translation1 translation2 translation3)
        TransformAxis rotation1: coordinates=mtp_angle_r axis=(-0.5809544 0 0.8139361) LinearFunction(coefficients=1 0)
    CustomJoint hip_l: socket_parent_frame=pelvis_offset socket_child_frame=femur_l_offset
      Coordinate hip_flexion_l: default_value=-0.4319321 range=(-2.094395 2.094395) clamped=false
      Coordinate hip_adduction_l: default_value=-0.05925638 range=(-2.094395 2.094395) clamped=false
      Coordinate hip_rotation_l: default_value=-0.2021092 range=(-2.094395 2.094395) clamped=false
      PhysicalOffsetFrame pelvis_offset: socket_parent=/bodyset/pelvis
          translation=(-0.07583802 -0.07090373 -0.08956825)
      PhysicalOffsetFrame femur_l_offset: socket_parent=/bodyset/femur_l translation=(0 0 0)
      SpatialTransform: axes_held_at_zero=(translation1 translation2 translation3)
        TransformAxis rotation1: coordinates=hip_flexion_l axis=(0 0 1) LinearFunction(coefficients=1 0)
        TransformAxis rotation2: coordinates=hip_adduction_l axis=(-1 0 0) LinearFunction(coefficients=1 0)
        TransformAxis rotation3: coordinates=hip_rotation_l axis=(0 -1 0) LinearFunction(coefficients=1 0)
    CustomJoint knee_l: socket_parent_frame=femur_l_offset socket_child_frame=tibia_l_offset
      Coordinate knee_angle_l: default_value=0.1709349 range=(-2.094395 0.1745329) clamped=false
      PhysicalOffsetFrame femur_l_offset: socket_parent=/bodyset/femur_l translation=(0 0 0)
      PhysicalOffsetFrame tibia_l_offset: socket_parent=/bodyset/tibia_l translation=(0 0 0)
      SpatialTransform: axes_held_at_zero=(rotation2 rotation3 translation3)
        TransformAxis rotation1: coordinates=knee_angle_l axis=(0 0 1) LinearFunction(coefficients=1 0)
        TransformAxis translation1: coordinates=knee_angle_l axis=(1 0 0)
          MultiplierFunction: scale=1.122583
            SimmSpline: x=(-2.0944 -1.74533 -1.39626 -1.0472 -0.698132 -0.349066 -0.174533 0.197344 0.337395 0.490178 1.52146 2.0944)
                y=(-0.0032 0.00179 0.00411 0.0041 0.00212 -0.001 -0.0031 -0.005227 -0.005435 -0.005574 -0.005435 -0.00525)
        TransformAxis translation2: coordinates=knee_angle_l axis=(0 1 0)
          MultiplierFunction: scale=1.122583
            SimmSpline: x=(-2.0944 -1.22173 -0.523599 -0.349066 -0.174533 0.159149 2.0944)
                y=(-0.4226 -0.4082 -0.399 -0.3976 -0.3966 -0.395264 -0.396)
    CustomJoint ankle_l: socket_parent_frame=tibia_l_offset socket_child_frame=talus_l_offset
      Coordinate ankle_angle_l: default_value=-0.007748342 range=(-1.047198 1.047198) clamped=false
      PhysicalOffsetFrame tibia_l_offset: socket_parent=/bodyset/tibia_l translation=(0 -0.4443805 0)
      PhysicalOffsetFrame talus_l_offset: socket_parent=/bodyset/talus_l translation=(0 0 0)
      SpatialTransform: axes_held_at_zero=(rotation2 rotation3 translation1 translation2 translation3)
        TransformAxis rotation1: coordinates=ankle_angle_l axis=(0.1050135 0.1740224 0.9791263)
            LinearFunction(coefficients=1 0)
    CustomJoint subtalar_l: socket_parent_frame=talus_l_offset socket_child_frame=calcn_l_offset
      Coordinate subtalar_angle_l: default_value=0.07418157 range=(-1.570796 1.570796) clamped=false
      PhysicalOffsetFrame talus_l_offset: socket_parent=/bodyset/talus_l
          translation=(-0.05188669 -0.04463085 -0.008426134)
      PhysicalOffsetFrame calcn_l_offset: socket_parent=/bodyset/calcn_l translation=(0 0 0)
      SpatialTransform: axes_held_at_zero=(rotation2 rotation3 translation1 translation2 translation3)
        TransformAxis rotation1: coordinates=subtalar_angle_l axis=(-0.7871796 -0.6047475 -0.1209495)
            LinearFunction(coefficients=1 0)
    CustomJoint mtp_l: socket_parent_frame=calcn_l_offset socket_child_frame=toes_l_offset
      Coordinate mtp_angle_l: default_value=0 range=(-1.047198 1.047198) clamped=false
      PhysicalOffsetFrame calcn_l_offset: socket_parent=/bodyset/calcn_l
          translation=(0.1902264 -0.002127812 -0.001149018)
      PhysicalOffsetFrame toes_l_offset: socket_parent=/bodyset/toes_l translation=(0 0 0)
      SpatialTransform: axes_held_at_zero=(rotation2 rotation3 translation1 translation2 translation3)
        TransformAxis rotation1: coordinates=mtp_angle_l axis=(0.5809544 0 0.8139361) LinearFunction(coefficients=1 0)
    CustomJoint back: socket_parent_frame=pelvis_offset socket_child_frame=torso_offset
      Coordinate lumbar_extension: default_value=-0.3731011 range=(-1.570796 1.570796) clamped=false
      Coordinate lumbar_bending: default_value=0.02895986 range=(-1.570796 1.570796) clamped=false
      Coordinate lumbar_rotation: default_value=0.05596236 range=(-1.570796 1.570796) clamped=false
      PhysicalOffsetFrame pelvis_offset: socket_parent=/bodyset/pelvis translation=(-0.1080182 0.0874229 0)
      PhysicalOffsetFrame torso_offset: socket_parent=/bodyset/torso translation=(0 0 0)
      SpatialTransform: axes_held_at_zero=(translation1 translation2 translation3)
        TransformAxis rotation1: coordinates=lumbar_extension axis=(0 0 1) LinearFunction(coefficients=1 0)
        TransformAxis rotation2: coordinates=lumbar_bending axis=(1 0 0) LinearFunction(coefficients=1 0)
        TransformAxis rotation3: coordinates=lumbar_rotation axis=(0 1 0) LinearFunction(coefficients=1 0)
    CustomJoint neck: socket_parent_frame=torso_offset socket_child_frame=head_offset
      Coordinate neck_flex: default_value=0 range=(-1.570796 1.570796) clamped=true
      Coordinate neck_latbend: default_value=0 range=(-1.570796 1.570796) clamped=true
      Coordinate neck_rot: default_value=0 range=(-1.570796 1.570796) clamped=true
      PhysicalOffsetFrame torso_offset: socket_parent=/bodyset/torso translation=(-0.0259808 0.48714 0)
      PhysicalOffsetFrame head_offset: socket_parent=/bodyset/head translation=(0 0 0)
      SpatialTransform: axes_held_at_zero=(translation1 translation2 translation3)
        TransformAxis rotation1: coordinates=neck_flex axis=(0 0 1) LinearFunction(coefficients=1 0)
        TransformAxis rotation2: coordinates=neck_latbend axis=(1 0 0) LinearFunction(coefficients=1 0)
        TransformAxis rotation3: coordinates=neck_rot axis=(0 1 0) LinearFunction(coefficients=1 0)
    CustomJoint acromial_r: socket_parent_frame=torso_offset socket_child_frame=humerus_r_offset
      Coordinate arm_flex_r: default_value=0.01347402 range=(-1.570796 4.712389) clamped=true
      Coordinate arm_add_r: default_value=-0.2648806 range=(-2.094395 1.570796) clamped=true
      Coordinate arm_rot_r: default_value=0.5815786 range=(-1.570796 1.570796) clamped=true
      PhysicalOffsetFrame torso_offset: socket_parent=/bodyset/torso translation=(0.003415393 0.4021612 0.1840307)
      PhysicalOffsetFrame humerus_r_offset: socket_parent=/bodyset/humerus_r translation=(0 0 0)
      SpatialTransform: axes_held_at_zero=(translation1 translation2 translation3)
        TransformAxis rotation1: coordinates=arm_flex_r axis=(0 0 1) LinearFunction(coefficients=1 0)
        TransformAxis rotation2: coordinates=arm_add_r axis=(1 0 0) LinearFunction(coefficients=1 0)
        TransformAxis rotation3: coordinates=arm_rot_r axis=(0 1 0) LinearFunction(coefficients=1 0)
    PinJoint elbow_r: socket_parent_frame=humerus_r_offset socket_child_frame=ulna_r_offset
      Coordinate elbow_flex_r: default_value=0.1198086 range=(0 2.618) clamped=true
      PhysicalOffsetFrame humerus_r_offset: socket_parent=/bodyset/humerus_r
          translation=(0.01473636 -0.3209543 -0.01075741) orientation=(-0.0228627 0.228018 0.0051689)
      PhysicalOffsetFrame ulna_r_offset: socket_parent=/bodyset/ulna_r translation=(0 0 0)
          orientation=(-0.0228627 0.228018 0.0051689)
    PinJoint radioulnar_r: socket_parent_frame=ulna_r_offset socket_child_frame=radius_r_offset
      Coordinate pro_sup_r: default_value=0.4336609 range=(0 1.570796) clamped=true
      PhysicalOffsetFrame ulna_r_offset: socket_parent=/bodyset/ulna_r
          translation=(-0.007036604 -0.01360563 0.02728345) orientation=(-1.56884 0.056428 1.53614)
      PhysicalOffsetFrame radius_r_offset: socket_parent=/bodyset/radius_r translation=(0 0 0)
          orientation=(-1.56884 0.056428 1.53614)
    UniversalJoint radius_hand_r: socket_parent_frame=radius_r_offset socket_child_frame=hand_r_offset
      Coordinate wrist_flex_r: default_value=0 range=(-1.22173 1.22173) clamped=true
      Coordinate wrist_dev_r: default_value=0 range=(-0.4363323 0.6108652) clamped=true
      PhysicalOffsetFrame radius_r_offset: socket_parent=/bodyset/radius_r
          translation=(-0.009201874 -0.2466954 0.01423639) orientation=(-1.5708 0 -1.5708)
      PhysicalOffsetFrame hand_r_offset: socket_parent=/bodyset/hand_r translation=(0 0 0)
          orientation=(-1.5708 0 -1.5708)
    CustomJoint acromial_l: socket_parent_frame=torso_offset socket_child_frame=humerus_l_offset
      Coordinate arm_flex_l: default_value=0.1023411 range=(-1.570796 4.712389) clamped=true
      Coordinate arm_add_l: default_value=-0.2308972 range=(-2.094395 1.570796) clamped=true
      Coordinate arm_rot_l: default_value=0.7664556 range=(-1.570796 1.570796) clamped=true
      PhysicalOffsetFrame torso_offset: socket_parent=/bodyset/torso translation=(0.003415393 0.4021612 -0.1840307)
      PhysicalOffsetFrame humerus_l_offset: socket_parent=/bodyset/humerus_l translation=(0 0 0)
      SpatialTransform: axes_held_at_zero=(translation1 translation2 translation3)
        TransformAxis rotation1: coordinates=arm_flex_l axis=(0 0 1) LinearFunction(coefficients=1 0)
        TransformAxis rotation2: coordinates=arm_add_l axis=(-1 0 0) LinearFunction(coefficients=1 0)
        TransformAxis rotation3: coordinates=arm_rot_l axis=(0 -1 0) LinearFunction(coefficients=1 0)
    PinJoint elbow_l: socket_parent_frame=humerus_l_offset socket_child_frame=ulna_l_offset
      Coordinate elbow_flex_l: default_value=0.1165045 range=(0 2.618) clamped=true
      PhysicalOffsetFrame humerus_l_offset: socket_parent=/bodyset/humerus_l
          translation=(0.01473636 -0.3209543 0.01075741) orientation=(0.0228627 -0.228018 0.0051689)
      PhysicalOffsetFrame ulna_l_offset: socket_parent=/bodyset/ulna_l translation=(0 0 0)
          orientation=(0.0228627 -0.228018 0.0051689)
    PinJoint radioulnar_l: socket_parent_frame=ulna_l_offset socket_child_frame=radius_l_offset
      Coordinate pro_sup_l: default_value=0.5841044 range=(0 1.570796) clamped=true
      PhysicalOffsetFrame ulna_l_offset: socket_parent=/bodyset/ulna_l
          translation=(-0.007036604 -0.01360563 -0.02728345) orientation=(1.56884 -0.056428 1.53614)
      PhysicalOffsetFrame radius_l_offset: socket_parent=/bodyset/radius_l translation=(0 0 0)
          orientation=(1.56884 -0.056428 1.53614)
    UniversalJoint radius_hand_l: socket_parent_frame=radius_l_offset socket_child_frame=hand_l_offset
      Coordinate wrist_flex_l: default_value=0 range=(-1.22173 1.22173) clamped=true
      Coordinate wrist_dev_l: default_value=0 range=(-0.4363323 0.6108652) clamped=true
      PhysicalOffsetFrame radius_l_offset: socket_parent=/bodyset/radius_l
          translation=(-0.009201874 -0.2466954 -0.01423639) orientation=(1.5708 0 1.5708)
      PhysicalOffsetFrame hand_l_offset: socket_parent=/bodyset/hand_l translation=(0 0 0)
          orientation=(1.5708 0 1.5708)
  ForceSet:
    Thelen2003Muscle [values shared by the 92 below unless stated]: optimal_force=1 max_contraction_velocity=10
        FmaxTendonStrain=0.033 FmaxMuscleStrain=0.6 KshapeActive=0.5 KshapePassive=4 Af=0.3 Flen=1.8
        activation_time_constant=0.01 [seconds] deactivation_time_constant=0.04 [seconds]
    Thelen2003Muscle glut_med1_r: max_isometric_force=819 optimal_fiber_length=0.058017 tendon_slack_length=0.08458553
        pennation_angle_at_optimal=0.1396263 [radians]
      PathPoint P1: pelvis (-0.04376508 0.03260928 0.1296862)
      PathPoint P2: femur_r (-0.0244723 -0.01313422 0.06230333)
    Thelen2003Muscle glut_med2_r: max_isometric_force=573 optimal_fiber_length=0.09165897
        tendon_slack_length=0.05749024 pennation_angle_at_optimal=0
      PathPoint P1: pelvis (-0.09171359 0.04773398 0.0821668)
      PathPoint P2: femur_r (-0.02896263 -0.006510979 0.0591601)
    Thelen2003Muscle glut_med3_r: max_isometric_force=653 optimal_fiber_length=0.07022271
        tendon_slack_length=0.05761306 pennation_angle_at_optimal=0.3316126
      PathPoint P1: pelvis (-0.131188 0.01126307 0.06950925)
      PathPoint P2: femur_r (-0.0346878 -0.005276138 0.05814978)
    Thelen2003Muscle glut_min1_r: max_isometric_force=270 optimal_fiber_length=0.0743779 tendon_slack_length=0.01750068
        pennation_angle_at_optimal=0.1745329
      PathPoint P1: pelvis (-0.05009386 -0.008581389 0.1132743)
      PathPoint P2: femur_r (-0.008082594 -0.01167486 0.06286462)
    Thelen2003Muscle glut_min2_r: max_isometric_force=285 optimal_fiber_length=0.0613794 tendon_slack_length=0.02849758
        pennation_angle_at_optimal=0
      PathPoint P1: pelvis (-0.06790024 -0.006972378 0.106302)
      PathPoint P2: femur_r (-0.01077679 -0.01167486 0.06286462)
    Thelen2003Muscle glut_min3_r: max_isometric_force=323 optimal_fiber_length=0.04166003
        tendon_slack_length=0.05591215 pennation_angle_at_optimal=0.01745329
      PathPoint P1: pelvis (-0.08946098 -0.006757844 0.09182086)
      PathPoint P2: femur_r (-0.01515486 -0.009317435 0.06174204)
    Thelen2003Muscle semimem_r: max_isometric_force=1288 optimal_fiber_length=0.0892493 tendon_slack_length=0.4005062
        pennation_angle_at_optimal=0.2617994
      PathPoint P1: pelvis (-0.1278627 -0.1045535 0.07670689)
      ConditionalPathPoint P2: tibia_r (-0.03596381 -0.03636686 -0.01954241)
          socket_coordinate=/jointset/knee_r/knee_angle_r range=(-0.558505 0.174533) [radians]
      PathPoint P3: tibia_r (-0.02790296 -0.04930556 -0.02022448)
    Thelen2003Muscle semiten_r: max_isometric_force=410 optimal_fiber_length=0.222302 tendon_slack_length=0.2825779
        pennation_angle_at_optimal=0.08726646
      PathPoint P1: pelvis (-0.1355323 -0.1178654 0.06477876)
      ConditionalPathPoint P2: tibia_r (-0.04343561 -0.02954613 -0.0235315)
          socket_coordinate=/jointset/knee_r/knee_angle_r range=(-0.331613 0.174533)
      PathPoint P3: tibia_r (-0.03433097 -0.05458646 -0.02364517)
      PathPoint P4: tibia_r (-0.01167791 -0.07709484 -0.02531935)
      PathPoint P5: tibia_r (0.002790296 -0.09879714 -0.01994545)
    Thelen2003Muscle bifemlh_r: max_isometric_force=896 optimal_fiber_length=0.1214046 tendon_slack_length=0.3631
        pennation_angle_at_optimal=0
      PathPoint P1: pelvis (-0.135114 -0.1100241 0.07448646)
      PathPoint P2: tibia_r (-0.03110663 -0.03720395 0.03041423)
      PathPoint P3: tibia_r (-0.02418256 -0.05818284 0.03544709)
    Thelen2003Muscle bifemsh_r: max_isometric_force=804 optimal_fiber_length=0.1902484 tendon_slack_length=0.09787344
        pennation_angle_at_optimal=0.4014257
      PathPoint P1: femur_r (0.005612913 -0.2369772 0.02626843)
      PathPoint P2: tibia_r (-0.03110663 -0.03720395 0.03041423)
      PathPoint P3: tibia_r (-0.02418256 -0.05818284 0.03544709)
    Thelen2003Muscle sar_r: max_isometric_force=156 optimal_fiber_length=0.5724765 tendon_slack_length=0.1100916
        pennation_angle_at_optimal=0
      PathPoint P1: pelvis (-0.01641191 -0.001394476 0.1332261)
      PathPoint P2: femur_r (-0.003367748 -0.4005375 -0.04726073)
      PathPoint P3: tibia_r (-0.00578728 -0.04330126 -0.04123437)
      PathPoint P4: tibia_r (0.006200658 -0.06086979 -0.03958086)
      PathPoint P5: tibia_r (0.02511266 -0.08680921 -0.02604276)
    Thelen2003Muscle add_long_r: max_isometric_force=627 optimal_fiber_length=0.1543555 tendon_slack_length=0.123037
        pennation_angle_at_optimal=0.1047198
      PathPoint P1: pelvis (-0.03389649 -0.08967551 0.01812818)
      PathPoint P2: femur_r (0.005612913 -0.2369772 0.02626843)
    Thelen2003Muscle add_brev_r: max_isometric_force=429 optimal_fiber_length=0.1478103 tendon_slack_length=0.02222711
        pennation_angle_at_optimal=0
      PathPoint P1: pelvis (-0.06296594 -0.09814964 0.01759185)
      PathPoint P2: femur_r (0.001010324 -0.1342609 0.03300393)
    Thelen2003Muscle add_mag1_r: max_isometric_force=381 optimal_fiber_length=0.09713816 tendon_slack_length=0.06699183
        pennation_angle_at_optimal=0.08726646
      PathPoint P1: pelvis (-0.07851971 -0.1259319 0.02735318)
      PathPoint P2: femur_r (-0.005051621 -0.1359447 0.03805555)
    Thelen2003Muscle add_mag2_r: max_isometric_force=343 optimal_fiber_length=0.1366916 tendon_slack_length=0.1355619
        pennation_angle_at_optimal=0.05235988
      PathPoint P1: pelvis (-0.08913918 -0.1278627 0.03303835)
      PathPoint P2: femur_r (0.006061946 -0.2565101 0.02548262)
    Thelen2003Muscle add_mag3_r: max_isometric_force=488 optimal_fiber_length=0.1478547 tendon_slack_length=0.2810367
        pennation_angle_at_optimal=0.08726646
      PathPoint P1: pelvis (-0.1191526 -0.1224242 0.05236793)
      PathPoint P2: femur_r (0.007858078 -0.4307349 -0.0298607)
    Thelen2003Muscle tfl_r: max_isometric_force=233 optimal_fiber_length=0.1052438 tendon_slack_length=0.4708277
        pennation_angle_at_optimal=0.05235988
      PathPoint P1: pelvis (-0.03336015 0.02295522 0.1331188)
      PathPoint P2: femur_r (0.03300393 -0.111697 0.06701818)
      PathPoint P3: femur_r (0.006061946 -0.4545337 0.0400762)
      PathPoint P4: tibia_r (0.006200658 -0.05032867 0.03069326)
    Thelen2003Muscle pect_r: max_isometric_force=266 optimal_fiber_length=0.1109853 tendon_slack_length=0.03662516
        pennation_angle_at_optimal=0
      PathPoint P1: pelvis (-0.04623223 -0.08238133 0.04837758)
      PathPoint P2: femur_r (-0.01369551 -0.09227628 0.02840134)
    Thelen2003Muscle grac_r: max_isometric_force=162 optimal_fiber_length=0.3903194 tendon_slack_length=0.1397166
        pennation_angle_at_optimal=0.05235988
      PathPoint P1: pelvis (-0.07938857 -0.1273264 0.0299705)
      ConditionalPathPoint P2: tibia_r (-0.02745858 -0.03296683 -0.03900214)
          socket_coordinate=/jointset/knee_r/knee_angle_r range=(-0.436332 0.174533)
      PathPoint P3: tibia_r (-0.0200798 -0.05325331 -0.03699726)
      PathPoint P4: tibia_r (0.006200658 -0.08639583 -0.0235625)
    Thelen2003Muscle glut_max1_r: max_isometric_force=573 optimal_fiber_length=0.1547594 tendon_slack_length=0.1362319
        pennation_angle_at_optimal=0.08726646
      PathPoint P1: pelvis (-0.1281845 0.06564762 0.07508715)
      PathPoint P2: pelvis (-0.1384822 0.001287208 0.09503888)
      PathPoint P3: femur_r (-0.05130202 -0.02784005 0.04400524)
      PathPoint P4: femur_r (-0.03109554 -0.06353817 0.05276138)
    Thelen2003Muscle glut_max2_r: max_isometric_force=819 optimal_fiber_length=0.1611984 tendon_slack_length=0.1392666
        pennation_angle_at_optimal=0
      PathPoint P1: pelvis (-0.1447037 0.01887906 0.06039152)
      PathPoint P2: pelvis (-0.1475999 -0.05577903 0.09804237)
      PathPoint P3: femur_r (-0.04782202 -0.05949687 0.03289167)
      PathPoint P4: femur_r (-0.01751229 -0.1140544 0.04703621)
    Thelen2003Muscle glut_max3_r: max_isometric_force=552 optimal_fiber_length=0.1579403 tendon_slack_length=0.1590371
        pennation_angle_at_optimal=0.08726646
      PathPoint P1: pelvis (-0.166908 -0.03368195 0.006221507)
      PathPoint P2: pelvis (-0.1640118 -0.1128453 0.04322875)
      PathPoint P3: femur_r (-0.03356522 -0.1168608 0.01515486)
      PathPoint P4: femur_r (-0.006735495 -0.1592945 0.04613814)
    Thelen2003Muscle iliacus_r: max_isometric_force=1073 optimal_fiber_length=0.1087535 tendon_slack_length=0.1087535
        pennation_angle_at_optimal=0.1221731
      PathPoint P1: pelvis (-0.0722982 0.03915259 0.09160633)
      PathPoint P2: pelvis (-0.02767498 -0.05899705 0.08699383)
      ConditionalPathPoint P3: pelvis (-0.030893 -0.08635023 0.08753017)
          socket_coordinate=/jointset/hip_r/hip_flexion_r range=(-1.5708 0.785398)
      PathPoint P4: femur_r (0.00190839 -0.06095623 0.00639872)
      PathPoint P5: femur_r (-0.02166584 -0.06971238 0.01448131)
    Thelen2003Muscle psoas_r: max_isometric_force=1113 optimal_fiber_length=0.1083544 tendon_slack_length=0.1733671
        pennation_angle_at_optimal=0.1396263
      PathPoint P1: pelvis (-0.06940198 0.09514615 0.03100027)
      PathPoint P2: pelvis (-0.02552963 -0.0611424 0.08141593)
      ConditionalPathPoint P3: pelvis (-0.030893 -0.08635023 0.08753017)
          socket_coordinate=/jointset/hip_r/hip_flexion_r range=(-1.5708 0.785398)
      PathPoint P4: femur_r (0.001796132 -0.05691493 0.004265814)
      PathPoint P5: femur_r (-0.02110455 -0.06701818 0.01167486)
    Thelen2003Muscle quad_fem_r: max_isometric_force=381 optimal_fiber_length=0.05897711 tendon_slack_length=0.02621205
        pennation_angle_at_optimal=0
      PathPoint P1: pelvis (-0.1226066 -0.1234647 0.05577903)
      PathPoint P2: femur_r (-0.04277039 -0.04030071 0.04108652)
    Thelen2003Muscle gem_r: max_isometric_force=164 optimal_fiber_length=0.02634505 tendon_slack_length=0.04281071
        pennation_angle_at_optimal=0
      PathPoint P1: pelvis (-0.1215339 -0.08795924 0.0765889)
      PathPoint P2: femur_r (-0.01594067 -0.003704522 0.04973041)
    Thelen2003Muscle peri_r: max_isometric_force=444 optimal_fiber_length=0.02816504 tendon_slack_length=0.1245762
        pennation_angle_at_optimal=0.1745329
      PathPoint P1: pelvis (-0.1497452 0.0003218021 0.02520783)
      PathPoint P2: pelvis (-0.12797 -0.02960579 0.07047466)
      PathPoint P3: femur_r (-0.01661422 -0.004041297 0.04905686)
    Thelen2003Muscle rect_fem_r: max_isometric_force=1169 optimal_fiber_length=0.1279706 tendon_slack_length=0.3479902
        pennation_angle_at_optimal=0.08726646
      PathPoint P1: pelvis (-0.03164387 -0.03336015 0.1038348)
      ConditionalPathPoint P2: femur_r (0.03749426 -0.4524008 0.002132907)
          socket_coordinate=/jointset/knee_r/knee_angle_r range=(-2.61799 -1.45997)
      MovingPathPoint P3: tibia_r socket_x_coordinate=/jointset/knee_r/knee_angle_r
          socket_y_coordinate=/jointset/knee_r/knee_angle_r socket_z_coordinate=/jointset/knee_r/knee_angle_r
        x_location: MultiplierFunction: scale=1.033443
          SimmSpline: x=(-2.0944 -1.99997 -1.5708 -1.45752 -1.39626 -1.0472 -0.698132 -0.526391 -0.349066 -0.174533 0 0.00017453 0.00034907 0.0279253 0.0872665 0.174533 2.0944)
              y=(0.0155805 0.0179938 0.0275081 0.0296564 0.0307615 0.0365695 0.0422074 0.0450902 0.048391 0.0534299 0.0617576 0.0617669 0.0617762 0.0633083 0.066994 0.0733035 0.0573481)
        y_location: MultiplierFunction: scale=1.033443
          SimmSpline: x=(-2.0944 -1.99997 -1.5708 -1.45752 -1.39626 -1.0472 -0.698132 -0.526391 -0.349066 -0.174533 0 0.00017453 0.00034907 0.0279253 0.0872665 0.174533 2.0944)
              y=(0.0234116 0.0237613 0.0251141 0.0252795 0.0253146 0.0249184 0.0242373 0.0238447 0.0234197 0.0227644 0.020984 0.0209814 0.0209788 0.0205225 0.0191754 0.0159554 -0.0673774)
        z_location: MultiplierFunction: scale=1.033443
          SimmSpline: x=(-2.0944 0.1745) y=(0.0014 0.0014)
    Thelen2003Muscle vas_med_r: max_isometric_force=1294 optimal_fiber_length=0.1004411 tendon_slack_length=0.1421975
        pennation_angle_at_optimal=0.08726646
      PathPoint P1: femur_r (0.01571616 -0.2356301 0.02110455)
      PathPoint P2: femur_r (0.03996394 -0.3108431 0.001010324)
      ConditionalPathPoint P3: femur_r (0.04153555 -0.4544214 -0.01403228)
          socket_coordinate=/jointset/knee_r/knee_angle_r range=(-2.61799 -1.21004)
      ConditionalPathPoint P4: femur_r (0.03075876 -0.4776589 -0.01470583)
          socket_coordinate=/jointset/knee_r/knee_angle_r range=(-2.61799 -1.78006)
      MovingPathPoint P5: tibia_r socket_x_coordinate=/jointset/knee_r/knee_angle_r
          socket_y_coordinate=/jointset/knee_r/knee_angle_r socket_z_coordinate=/jointset/knee_r/knee_angle_r
        x_location: MultiplierFunction: scale=1.033443
          SimmSpline: x=(-2.0944 -1.99997 -1.5708 -1.45752 -1.39626 -1.0472 -0.698132 -0.526391 -0.349066 -0.174533 0 0.00017453 0.00034907 0.0279253 0.0872665 0.174533 2.0944)
              y=(0.00981097 0.0122243 0.0217371 0.0238851 0.0249902 0.0307959 0.0364187 0.0392871 0.0425654 0.0475764 0.0559586 0.0559681 0.0559776 0.0575419 0.0613368 0.0679503 0.0629332)
        y_location: MultiplierFunction: scale=1.033443
          SimmSpline: x=(-2.0944 -1.99997 -1.5708 -1.45752 -1.39626 -1.0472 -0.698132 -0.526391 -0.349066 -0.174533 0 0.00017453 0.00034907 0.0279253 0.0872665 0.174533 2.0944)
              y=(0.0224154 0.0227651 0.0241265 0.0242933 0.0243287 0.0239462 0.0233593 0.0230677 0.0228342 0.0226362 0.0217917 0.0217903 0.0217889 0.0215365 0.0206842 0.0183269 -0.0656205)
        z_location: MultiplierFunction: scale=1.033443
          SimmSpline: x=(-2.0944 2.0944) y=(-0.0146 -0.0146)
    Thelen2003Muscle vas_int_r: max_isometric_force=1365 optimal_fiber_length=0.0985185 tendon_slack_length=0.1540059
        pennation_angle_at_optimal=0.05235988
      PathPoint P1: femur_r (0.03255489 -0.2159849 0.03480006)
      PathPoint P2: femur_r (0.03760652 -0.2339462 0.0319936)
      ConditionalPathPoint P3: femur_r (0.03850458 -0.4524008 0.006174204)
          socket_coordinate=/jointset/knee_r/knee_angle_r range=(-2.61799 -1.42)
      MovingPathPoint P4: tibia_r socket_x_coordinate=/jointset/knee_r/knee_angle_r
          socket_y_coordinate=/jointset/knee_r/knee_angle_r socket_z_coordinate=/jointset/knee_r/knee_angle_r
        x_location: MultiplierFunction: scale=1.033443
          SimmSpline: x=(-2.0944 -1.99997 -1.5708 -1.45752 -1.39626 -1.0472 -0.698132 -0.526391 -0.349066 -0.174533 0 0.00017453 0.00034907 0.0279253 0.0872665 0.174533 2.0944)
              y=(0.0082733 0.0106866 0.0202042 0.022353 0.0234583 0.0292715 0.0349465 0.037871 0.0412569 0.0465287 0.0554632 0.0554735 0.0554837 0.0571717 0.061272 0.0684368 0.0648818)
        y_location: MultiplierFunction: scale=1.033443
          SimmSpline: x=(-2.0944 -1.99997 -1.5708 -1.45752 -1.39626 -1.0472 -0.698132 -0.526391 -0.349066 -0.174533 0 0.00017453 0.00034907 0.0279253 0.0872665 0.174533 2.0944)
              y=(0.025599 0.0259487 0.0273124 0.0274796 0.0275151 0.0271363 0.0265737 0.0263073 0.0261187 0.0260129 0.0252923 0.0252911 0.0252898 0.0250526 0.0242191 0.0218288 -0.0685706)
        z_location: MultiplierFunction: scale=1.033443
          SimmSpline: x=(-2.0944 2.0944) y=(0.0018 0.0018)
    Thelen2003Muscle vas_lat_r: max_isometric_force=1871 optimal_fiber_length=0.09464663 tendon_slack_length=0.1768991
        pennation_angle_at_optimal=0.08726646
      PathPoint P1: femur_r (0.005388396 -0.2081268 0.03917813)
      PathPoint P2: femur_r (0.03019747 -0.2908611 0.04591363)
      ConditionalPathPoint P3: femur_r (0.04052523 -0.4524008 0.02301294)
          socket_coordinate=/jointset/knee_r/knee_angle_r range=(-2.61799 -1.21004)
      ConditionalPathPoint P4: femur_r (0.02840134 -0.4763118 0.02065552)
          socket_coordinate=/jointset/knee_r/knee_angle_r range=(-2.61799 -1.92004)
      MovingPathPoint P5: tibia_r socket_x_coordinate=/jointset/knee_r/knee_angle_r
          socket_y_coordinate=/jointset/knee_r/knee_angle_r socket_z_coordinate=/jointset/knee_r/knee_angle_r
        x_location: MultiplierFunction: scale=1.033443
          SimmSpline: x=(-2.0944 -1.99997 -1.5708 -1.45752 -1.39626 -1.0472 -0.698132 -0.526391 -0.349066 -0.174533 0 0.00017453 0.00034907 0.0279253 0.0872665 0.174533 2.0944)
              y=(0.0142897 0.016703 0.0262145 0.0283623 0.0294674 0.0352709 0.0408785 0.0437291 0.0469704 0.0518742 0.0599557 0.0599647 0.0599738 0.0614577 0.0650351 0.0711867 0.0583766)
        y_location: MultiplierFunction: scale=1.033443
          SimmSpline: x=(-2.0944 -1.99997 -1.5708 -1.45752 -1.39626 -1.0472 -0.698132 -0.526391 -0.349066 -0.174533 0 0.00017453 0.00034907 0.0279253 0.0872665 0.174533 2.0944)
              y=(0.0215318 0.0218815 0.0232362 0.0234019 0.0234371 0.0230439 0.0223842 0.0220151 0.0216359 0.0210971 0.0195864 0.0195842 0.019582 0.01919 0.018008 0.0151073 -0.0653421)
        z_location: MultiplierFunction: scale=1.033443
          SimmSpline: x=(-2.0944 2.0944) y=(0.0165 0.0165)
    Thelen2003Muscle med_gas_r: max_isometric_force=1558 optimal_fiber_length=0.06216448 tendon_slack_length=0.4040691
        pennation_angle_at_optimal=0.296706
      PathPoint P1: femur_r (-0.02132907 -0.4410627 -0.02638069)
      ConditionalPathPoint P2: femur_r (-0.03367748 -0.4515027 -0.02896263)
          socket_coordinate=/jointset/knee_r/knee_angle_r range=(-0.785398 0.174533)
      PathPoint P3: calcn_r (0 0.03298108 -0.005638701)
    Thelen2003Muscle lat_gas_r: max_isometric_force=683 optimal_fiber_length=0.06626344 tendon_slack_length=0.3934392
        pennation_angle_at_optimal=0.1396263
      PathPoint P1: femur_r (-0.02469682 -0.4429711 0.03053425)
      ConditionalPathPoint P2: femur_r (-0.03367748 -0.4510537 0.03075876)
          socket_coordinate=/jointset/knee_r/knee_angle_r range=(-0.785398 0.174533)
      PathPoint P3: calcn_r (0 0.03298108 -0.005638701)
    Thelen2003Muscle soleus_r: max_isometric_force=3549 optimal_fiber_length=0.05176957 tendon_slack_length=0.2588479
        pennation_angle_at_optimal=0.4363323
      PathPoint P1: tibia_r (-0.002480263 -0.1584268 0.007337445)
      PathPoint P2: calcn_r (0 0.03298108 -0.005638701)
    Thelen2003Muscle tib_post_r: max_isometric_force=1588 optimal_fiber_length=0.03216057 tendon_slack_length=0.3216057
        pennation_angle_at_optimal=0.2094395
      PathPoint P1: tibia_r (-0.009714364 -0.1393081 0.001963542)
      PathPoint P2: tibia_r (-0.01488158 -0.4186477 -0.02366584)
      PathPoint P3: calcn_r (0.04436487 0.03553445 -0.03042771)
      PathPoint P4: calcn_r (0.08213353 0.0169161 -0.02989575)
    Thelen2003Muscle flex_dig_r: max_isometric_force=310 optimal_fiber_length=0.03562497 tendon_slack_length=0.4191173
        pennation_angle_at_optimal=0.1221731
      PathPoint P1: tibia_r (-0.008577576 -0.2114424 -0.001860197)
      PathPoint P2: tibia_r (-0.01591502 -0.4186477 -0.02025548)
      PathPoint P3: calcn_r (0.04638629 0.03351303 -0.02978936)
      PathPoint P4: calcn_r (0.07532453 0.01872474 -0.02798072)
      PathPoint P5: calcn_r (0.1763956 -0.008617637 0.01234131)
      PathPoint P6: toes_r (-0.002021421 -0.008298465 0.01563942)
      PathPoint P7: toes_r (0.03032132 -0.007553731 0.02287398)
      PathPoint P8: toes_r (0.04691825 -0.006383435 0.02574652)
    Thelen2003Muscle flex_hal_r: max_isometric_force=322 optimal_fiber_length=0.04510742 tendon_slack_length=0.3986237
        pennation_angle_at_optimal=0.1745329
      PathPoint P1: tibia_r (-0.008164199 -0.2412056 0.02521601)
      PathPoint P2: tibia_r (-0.01922204 -0.4215414 -0.01798191)
      PathPoint P3: calcn_r (0.03979008 0.0293638 -0.02564013)
      PathPoint P4: calcn_r (0.1104334 0.00723456 -0.02723599)
      PathPoint P5: calcn_r (0.1836301 -0.005638701 -0.02861907)
      PathPoint P6: toes_r (0.01649054 -0.006808997 -0.0281935)
      PathPoint P7: toes_r (0.05979151 -0.01085184 -0.0192567)
    Thelen2003Muscle tib_ant_r: max_isometric_force=905 optimal_fiber_length=0.1018405 tendon_slack_length=0.2317391
        pennation_angle_at_optimal=0.08726646
      PathPoint P1: tibia_r (0.01849863 -0.1678311 0.01188459)
      PathPoint P2: tibia_r (0.03400027 -0.4083133 -0.01829194)
      PathPoint P3: calcn_r (0.1240514 0.01893752 -0.03244913)
    Thelen2003Muscle per_brev_r: max_isometric_force=435 optimal_fiber_length=0.05195122 tendon_slack_length=0.1672829
        pennation_angle_at_optimal=0.08726646
      PathPoint P1: tibia_r (-0.007234101 -0.273449 0.0335869)
      PathPoint P2: tibia_r (-0.02046217 -0.4323925 0.02924643)
      PathPoint P3: tibia_r (-0.01488158 -0.4438637 0.0298665)
      PathPoint P4: calcn_r (0.05010996 0.02872546 0.02478901)
      PathPoint P5: calcn_r (0.07202642 0.02329954 0.03649197)
    Thelen2003Muscle per_long_r: max_isometric_force=943 optimal_fiber_length=0.05106831 tendon_slack_length=0.3595626
        pennation_angle_at_optimal=0.1745329
      PathPoint P1: tibia_r (0.0005167215 -0.1620439 0.03741063)
      PathPoint P2: tibia_r (-0.02139227 -0.4345628 0.02955647)
      PathPoint P3: tibia_r (-0.01674178 -0.446344 0.0298665)
      PathPoint P4: calcn_r (0.04659908 0.02446983 0.02351232)
      PathPoint P5: calcn_r (0.07245199 0.0112774 0.03021493)
      PathPoint P6: calcn_r (0.09064478 0.00734095 0.01255409)
      PathPoint P7: calcn_r (0.1279879 0.0090432 -0.01957587)
    Thelen2003Muscle per_tert_r: max_isometric_force=180 optimal_fiber_length=0.08223377 tendon_slack_length=0.1040934
        pennation_angle_at_optimal=0.2268928
      PathPoint P1: tibia_r (0.001033443 -0.2897774 0.02387253)
      PathPoint P2: tibia_r (0.02366584 -0.4205079 0.01643174)
      PathPoint P3: calcn_r (0.09117673 0.02425705 0.03181078)
    Thelen2003Muscle ext_dig_r: max_isometric_force=512 optimal_fiber_length=0.1065568 tendon_slack_length=0.3604128
        pennation_angle_at_optimal=0.1396263
      PathPoint P1: tibia_r (0.003307017 -0.1427185 0.02852302)
      PathPoint P2: tibia_r (0.0298665 -0.4141006 0.007440789)
      PathPoint P3: calcn_r (0.09809212 0.04127955 -0.0001063906)
      PathPoint P4: calcn_r (0.1719272 0.005851482 0.01383078)
      PathPoint P5: toes_r (0.0003191717 0.005000357 0.01627776)
      PathPoint P6: toes_r (0.04713103 -0.0004255623 0.02659765)
    Thelen2003Muscle ext_hal_r: max_isometric_force=162 optimal_fiber_length=0.1161172 tendon_slack_length=0.3190607
        pennation_angle_at_optimal=0.1047198
      PathPoint P1: tibia_r (0.001240132 -0.1826094 0.0235625)
      PathPoint P2: tibia_r (0.03369024 -0.411827 -0.008784265)
      PathPoint P3: calcn_r (0.1031989 0.04138594 -0.02244841)
      PathPoint P4: calcn_r (0.137563 0.03287469 -0.02734238)
      PathPoint P5: calcn_r (0.1844813 0.01478829 -0.02978936)
      PathPoint P6: toes_r (0.03170439 0.004362014 -0.02606569)
      PathPoint P7: toes_r (0.0598979 0.00361728 -0.01978865)
    Thelen2003Muscle glut_med1_l: max_isometric_force=819 optimal_fiber_length=0.058017 tendon_slack_length=0.08458553
        pennation_angle_at_optimal=0.1396263
      PathPoint P1: pelvis (-0.04376508 0.03260928 -0.1296862)
      PathPoint P2: femur_l (-0.0244723 -0.01313422 -0.06230333)
    Thelen2003Muscle glut_med2_l: max_isometric_force=573 optimal_fiber_length=0.09165897
        tendon_slack_length=0.05749024 pennation_angle_at_optimal=0
      PathPoint P1: pelvis (-0.09171359 0.04773398 -0.0821668)
      PathPoint P2: femur_l (-0.02896263 -0.006510979 -0.0591601)
    Thelen2003Muscle glut_med3_l: max_isometric_force=653 optimal_fiber_length=0.07022271
        tendon_slack_length=0.05761306 pennation_angle_at_optimal=0.3316126
      PathPoint P1: pelvis (-0.131188 0.01126307 -0.06950925)
      PathPoint P2: femur_l (-0.0346878 -0.005276138 -0.05814978)
    Thelen2003Muscle glut_min1_l: max_isometric_force=270 optimal_fiber_length=0.0743779 tendon_slack_length=0.01750068
        pennation_angle_at_optimal=0.1745329
      PathPoint P1: pelvis (-0.05009386 -0.008581389 -0.1132743)
      PathPoint P2: femur_l (-0.008082594 -0.01167486 -0.06286462)
    Thelen2003Muscle glut_min2_l: max_isometric_force=285 optimal_fiber_length=0.0613794 tendon_slack_length=0.02849758
        pennation_angle_at_optimal=0
      PathPoint P1: pelvis (-0.06790024 -0.006972378 -0.106302)
      PathPoint P2: femur_l (-0.01077679 -0.01167486 -0.06286462)
    Thelen2003Muscle glut_min3_l: max_isometric_force=323 optimal_fiber_length=0.04166003
        tendon_slack_length=0.05591215 pennation_angle_at_optimal=0.01745329
      PathPoint P1: pelvis (-0.08946098 -0.006757844 -0.09182086)
      PathPoint P2: femur_l (-0.01515486 -0.009317435 -0.06174204)
    Thelen2003Muscle semimem_l: max_isometric_force=1288 optimal_fiber_length=0.0892493 tendon_slack_length=0.4005062
        pennation_angle_at_optimal=0.2617994
      PathPoint P1: pelvis (-0.1278627 -0.1045535 -0.07670689)
      ConditionalPathPoint P2: tibia_l (-0.03596381 -0.03636686 0.01954241)
          socket_coordinate=/jointset/knee_l/knee_angle_l range=(-0.558505 0.174533)
      PathPoint P3: tibia_l (-0.02790296 -0.04930556 0.02022448)
    Thelen2003Muscle semiten_l: max_isometric_force=410 optimal_fiber_length=0.222302 tendon_slack_length=0.2825779
        pennation_angle_at_optimal=0.08726646
      PathPoint P1: pelvis (-0.1355323 -0.1178654 -0.06477876)
      ConditionalPathPoint P2: tibia_l (-0.04343561 -0.02954613 0.0235315)
          socket_coordinate=/jointset/knee_l/knee_angle_l range=(-0.331613 0.174533)
      PathPoint P3: tibia_l (-0.03433097 -0.05458646 0.02364517)
      PathPoint P4: tibia_l (-0.01167791 -0.07709484 0.02531935)
      PathPoint P5: tibia_l (0.002790296 -0.09879714 0.01994545)
    Thelen2003Muscle bifemlh_l: max_isometric_force=896 optimal_fiber_length=0.1214046 tendon_slack_length=0.3631
        pennation_angle_at_optimal=0
      PathPoint P1: pelvis (-0.135114 -0.1100241 -0.07448646)
      PathPoint P2: tibia_l (-0.03110663 -0.03720395 -0.03041423)
      PathPoint P3: tibia_l (-0.02418256 -0.05818284 -0.03544709)
    Thelen2003Muscle bifemsh_l: max_isometric_force=804 optimal_fiber_length=0.1902484 tendon_slack_length=0.09787344
        pennation_angle_at_optimal=0.4014257
      PathPoint P1: femur_l (0.005612913 -0.2369772 -0.02626843)
      PathPoint P2: tibia_l (-0.03110663 -0.03720395 -0.03041423)
      PathPoint P3: tibia_l (-0.02418256 -0.05818284 -0.03544709)
    Thelen2003Muscle sar_l: max_isometric_force=156 optimal_fiber_length=0.5724765 tendon_slack_length=0.1100916
        pennation_angle_at_optimal=0
      PathPoint P1: pelvis (-0.01641191 -0.001394476 -0.1332261)
      PathPoint P2: femur_l (-0.003367748 -0.4005375 0.04726073)
      PathPoint P3: tibia_l (-0.00578728 -0.04330126 0.04123437)
      PathPoint P4: tibia_l (0.006200658 -0.06086979 0.03958086)
      PathPoint P5: tibia_l (0.02511266 -0.08680921 0.02604276)
    Thelen2003Muscle add_long_l: max_isometric_force=627 optimal_fiber_length=0.1543555 tendon_slack_length=0.123037
        pennation_angle_at_optimal=0.1047198
      PathPoint P1: pelvis (-0.03389649 -0.08967551 -0.01812818)
      PathPoint P2: femur_l (0.005612913 -0.2369772 -0.02626843)
    Thelen2003Muscle add_brev_l: max_isometric_force=429 optimal_fiber_length=0.1478103 tendon_slack_length=0.02222711
        pennation_angle_at_optimal=0
      PathPoint P1: pelvis (-0.06296594 -0.09814964 -0.01759185)
      PathPoint P2: femur_l (0.001010324 -0.1342609 -0.03300393)
    Thelen2003Muscle add_mag1_l: max_isometric_force=381 optimal_fiber_length=0.09713816 tendon_slack_length=0.06699183
        pennation_angle_at_optimal=0.08726646
      PathPoint P1: pelvis (-0.07851971 -0.1259319 -0.02735318)
      PathPoint P2: femur_l (-0.005051621 -0.1359447 -0.03805555)
    Thelen2003Muscle add_mag2_l: max_isometric_force=343 optimal_fiber_length=0.1366916 tendon_slack_length=0.1355619
        pennation_angle_at_optimal=0.05235988
      PathPoint P1: pelvis (-0.08913918 -0.1278627 -0.03303835)
      PathPoint P2: femur_l (0.006061946 -0.2565101 -0.02548262)
    Thelen2003Muscle add_mag3_l: max_isometric_force=488 optimal_fiber_length=0.1478547 tendon_slack_length=0.2810367
        pennation_angle_at_optimal=0.08726646
      PathPoint P1: pelvis (-0.1191526 -0.1224242 -0.05236793)
      PathPoint P2: femur_l (0.007858078 -0.4307349 0.0298607)
    Thelen2003Muscle tfl_l: max_isometric_force=233 optimal_fiber_length=0.1052438 tendon_slack_length=0.4708277
        pennation_angle_at_optimal=0.05235988
      PathPoint P1: pelvis (-0.03336015 0.02295522 -0.1331188)
      PathPoint P2: femur_l (0.03300393 -0.111697 -0.06701818)
      PathPoint P3: femur_l (0.006061946 -0.4545337 -0.0400762)
      PathPoint P4: tibia_l (0.006200658 -0.05032867 -0.03069326)
    Thelen2003Muscle pect_l: max_isometric_force=266 optimal_fiber_length=0.1109853 tendon_slack_length=0.03662516
        pennation_angle_at_optimal=0
      PathPoint P1: pelvis (-0.04623223 -0.08238133 -0.04837758)
      PathPoint P2: femur_l (-0.01369551 -0.09227628 -0.02840134)
    Thelen2003Muscle grac_l: max_isometric_force=162 optimal_fiber_length=0.3903194 tendon_slack_length=0.1397166
        pennation_angle_at_optimal=0.05235988
      PathPoint P1: pelvis (-0.07938857 -0.1273264 -0.0299705)
      ConditionalPathPoint P2: tibia_l (-0.02745858 -0.03296683 0.03900214)
          socket_coordinate=/jointset/knee_l/knee_angle_l range=(-0.436332 0.174533)
      PathPoint P3: tibia_l (-0.0200798 -0.05325331 0.03699726)
      PathPoint P4: tibia_l (0.006200658 -0.08639583 0.0235625)
    Thelen2003Muscle glut_max1_l: max_isometric_force=573 optimal_fiber_length=0.1547594 tendon_slack_length=0.1362319
        pennation_angle_at_optimal=0.08726646
      PathPoint P1: pelvis (-0.1281845 0.06564762 -0.07508715)
      PathPoint P2: pelvis (-0.1384822 0.001287208 -0.09503888)
      PathPoint P3: femur_l (-0.05130202 -0.02784005 -0.04400524)
      PathPoint P4: femur_l (-0.03109554 -0.06353817 -0.05276138)
    Thelen2003Muscle glut_max2_l: max_isometric_force=819 optimal_fiber_length=0.1611984 tendon_slack_length=0.1392666
        pennation_angle_at_optimal=0
      PathPoint P1: pelvis (-0.1447037 0.01887906 -0.06039152)
      PathPoint P2: pelvis (-0.1475999 -0.05577903 -0.09804237)
      PathPoint P3: femur_l (-0.04782202 -0.05949687 -0.03289167)
      PathPoint P4: femur_l (-0.01751229 -0.1140544 -0.04703621)
    Thelen2003Muscle glut_max3_l: max_isometric_force=552 optimal_fiber_length=0.1579403 tendon_slack_length=0.1590371
        pennation_angle_at_optimal=0.08726646
      PathPoint P1: pelvis (-0.166908 -0.03368195 -0.006221507)
      PathPoint P2: pelvis (-0.1640118 -0.1128453 -0.04322875)
      PathPoint P3: femur_l (-0.03356522 -0.1168608 -0.01515486)
      PathPoint P4: femur_l (-0.006735495 -0.1592945 -0.04613814)
    Thelen2003Muscle iliacus_l: max_isometric_force=1073 optimal_fiber_length=0.1087535 tendon_slack_length=0.1087535
        pennation_angle_at_optimal=0.1221731
      PathPoint P1: pelvis (-0.0722982 0.03915259 -0.09160633)
      PathPoint P2: pelvis (-0.02767498 -0.05899705 -0.08699383)
      ConditionalPathPoint P3: pelvis (-0.030893 -0.08635023 -0.08753017)
          socket_coordinate=/jointset/hip_l/hip_flexion_l range=(-1.5708 0.785398)
      PathPoint P4: femur_l (0.00190839 -0.06095623 -0.00639872)
      PathPoint P5: femur_l (-0.02166584 -0.06971238 -0.01448131)
    Thelen2003Muscle psoas_l: max_isometric_force=1113 optimal_fiber_length=0.1083544 tendon_slack_length=0.1733671
        pennation_angle_at_optimal=0.1396263
      PathPoint P1: pelvis (-0.06940198 0.09514615 -0.03100027)
      PathPoint P2: pelvis (-0.02552963 -0.0611424 -0.08141593)
      ConditionalPathPoint P3: pelvis (-0.030893 -0.08635023 -0.08753017)
          socket_coordinate=/jointset/hip_l/hip_flexion_l range=(-1.5708 0.785398)
      PathPoint P4: femur_l (0.001796132 -0.05691493 -0.004265814)
      PathPoint P5: femur_l (-0.02110455 -0.06701818 -0.01167486)
    Thelen2003Muscle quad_fem_l: max_isometric_force=381 optimal_fiber_length=0.05897711 tendon_slack_length=0.02621205
        pennation_angle_at_optimal=0
      PathPoint P1: pelvis (-0.1226066 -0.1234647 -0.05577903)
      PathPoint P2: femur_l (-0.04277039 -0.04030071 -0.04108652)
    Thelen2003Muscle gem_l: max_isometric_force=164 optimal_fiber_length=0.02634505 tendon_slack_length=0.04281071
        pennation_angle_at_optimal=0
      PathPoint P1: pelvis (-0.1215339 -0.08795924 -0.0765889)
      PathPoint P2: femur_l (-0.01594067 -0.003704522 -0.04973041)
    Thelen2003Muscle peri_l: max_isometric_force=444 optimal_fiber_length=0.02816504 tendon_slack_length=0.1245762
        pennation_angle_at_optimal=0.1745329
      PathPoint P1: pelvis (-0.1497452 0.0003218021 -0.02520783)
      PathPoint P2: pelvis (-0.12797 -0.02960579 -0.07047466)
      PathPoint P3: femur_l (-0.01661422 -0.004041297 -0.04905686)
    Thelen2003Muscle rect_fem_l: max_isometric_force=1169 optimal_fiber_length=0.1279706 tendon_slack_length=0.3479902
        pennation_angle_at_optimal=0.08726646
      PathPoint P1: pelvis (-0.03164387 -0.03336015 -0.1038348)
      ConditionalPathPoint P2: femur_l (0.03749426 -0.4524008 -0.002132907)
          socket_coordinate=/jointset/knee_l/knee_angle_l range=(-2.61799 -1.45997)
      MovingPathPoint P3: tibia_l socket_x_coordinate=/jointset/knee_l/knee_angle_l
          socket_y_coordinate=/jointset/knee_l/knee_angle_l socket_z_coordinate=/jointset/knee_l/knee_angle_l
        x_location: MultiplierFunction: scale=1.033443
          SimmSpline: x=(-2.0944 -1.99997 -1.5708 -1.45752 -1.39626 -1.0472 -0.698132 -0.526391 -0.349066 -0.174533 0 0.00017453 0.00034907 0.0279253 0.0872665 0.174533 2.0944)
              y=(0.0155805 0.0179938 0.0275081 0.0296564 0.0307615 0.0365695 0.0422074 0.0450902 0.048391 0.0534299 0.0617576 0.0617669 0.0617762 0.0633083 0.066994 0.0733035 0.0573481)
        y_location: MultiplierFunction: scale=1.033443
          SimmSpline: x=(-2.0944 -1.99997 -1.5708 -1.45752 -1.39626 -1.0472 -0.698132 -0.526391 -0.349066 -0.174533 0 0.00017453 0.00034907 0.0279253 0.0872665 0.174533 2.0944)
              y=(0.0234116 0.0237613 0.0251141 0.0252795 0.0253146 0.0249184 0.0242373 0.0238447 0.0234197 0.0227644 0.020984 0.0209814 0.0209788 0.0205225 0.0191754 0.0159554 -0.0673774)
        z_location: MultiplierFunction: scale=1.033443
          SimmSpline: x=(-2.0944 0.1745) y=(-0.0014 -0.0014)
    Thelen2003Muscle vas_med_l: max_isometric_force=1294 optimal_fiber_length=0.1004411 tendon_slack_length=0.1421975
        pennation_angle_at_optimal=0.08726646
      PathPoint P1: femur_l (0.01571616 -0.2356301 -0.02110455)
      PathPoint P2: femur_l (0.03996394 -0.3108431 -0.001010324)
      ConditionalPathPoint P3: femur_l (0.04153555 -0.4544214 0.01403228)
          socket_coordinate=/jointset/knee_l/knee_angle_l range=(-2.61799 -1.21004)
      ConditionalPathPoint P4: femur_l (0.03075876 -0.4776589 0.01470583)
          socket_coordinate=/jointset/knee_l/knee_angle_l range=(-2.61799 -1.78006)
      MovingPathPoint P5: tibia_l socket_x_coordinate=/jointset/knee_l/knee_angle_l
          socket_y_coordinate=/jointset/knee_l/knee_angle_l socket_z_coordinate=/jointset/knee_l/knee_angle_l
        x_location: MultiplierFunction: scale=1.033443
          SimmSpline: x=(-2.0944 -1.99997 -1.5708 -1.45752 -1.39626 -1.0472 -0.698132 -0.526391 -0.349066 -0.174533 0 0.00017453 0.00034907 0.0279253 0.0872665 0.174533 2.0944)
              y=(0.00981097 0.0122243 0.0217371 0.0238851 0.0249902 0.0307959 0.0364187 0.0392871 0.0425654 0.0475764 0.0559586 0.0559681 0.0559776 0.0575419 0.0613368 0.0679503 0.0629332)
        y_location: MultiplierFunction: scale=1.033443
          SimmSpline: x=(-2.0944 -1.99997 -1.5708 -1.45752 -1.39626 -1.0472 -0.698132 -0.526391 -0.349066 -0.174533 0 0.00017453 0.00034907 0.0279253 0.0872665 0.174533 2.0944)
              y=(0.0224154 0.0227651 0.0241265 0.0242933 0.0243287 0.0239462 0.0233593 0.0230677 0.0228342 0.0226362 0.0217917 0.0217903 0.0217889 0.0215365 0.0206842 0.0183269 -0.0656205)
        z_location: MultiplierFunction: scale=1.033443
          SimmSpline: x=(-2.0944 2.0944) y=(0.0146 0.0146)
    Thelen2003Muscle vas_int_l: max_isometric_force=1365 optimal_fiber_length=0.09820634 tendon_slack_length=0.153518
        pennation_angle_at_optimal=0.05235988
      PathPoint P1: femur_l (0.03255489 -0.2159849 -0.03480006)
      PathPoint P2: femur_l (0.03760652 -0.2339462 -0.0319936)
      ConditionalPathPoint P3: femur_l (0.03850458 -0.4524008 -0.006174204)
          socket_coordinate=/jointset/knee_l/knee_angle_l range=(-2.61799 -1.42)
      MovingPathPoint P4: tibia_l socket_x_coordinate=/jointset/knee_l/knee_angle_l
          socket_y_coordinate=/jointset/knee_l/knee_angle_l socket_z_coordinate=/jointset/knee_l/knee_angle_l
        x_location: MultiplierFunction: scale=1.033443
          SimmSpline: x=(-2.0944 -1.99997 -1.5708 -1.45752 -1.39626 -1.0472 -0.698132 -0.526391 -0.349066 -0.174533 0 0.00017453 0.00034907 0.0279253 0.0872665 0.174533 2.0944)
              y=(0.0155805 0.0179938 0.0275081 0.0296564 0.0307615 0.0365695 0.0422074 0.0450902 0.048391 0.0534299 0.0617576 0.0617669 0.0617762 0.0633083 0.066994 0.0733035 0.0573481)
        y_location: MultiplierFunction: scale=1.033443
          SimmSpline: x=(-2.0944 -1.99997 -1.5708 -1.45752 -1.39626 -1.0472 -0.698132 -0.526391 -0.349066 -0.174533 0 0.00017453 0.00034907 0.0279253 0.0872665 0.174533 2.0944)
              y=(0.0234116 0.0237613 0.0251141 0.0252795 0.0253146 0.0249184 0.0242373 0.0238447 0.0234197 0.0227644 0.020984 0.0209814 0.0209788 0.0205225 0.0191754 0.0159554 -0.0673774)
        z_location: MultiplierFunction: scale=1.033443
          SimmSpline: x=(-2.0944 0.1745) y=(-0.0014 -0.0014)
    Thelen2003Muscle vas_lat_l: max_isometric_force=1871 optimal_fiber_length=0.09464663 tendon_slack_length=0.1768991
        pennation_angle_at_optimal=0.08726646
      PathPoint P1: femur_l (0.005388396 -0.2081268 -0.03917813)
      PathPoint P2: femur_l (0.03019747 -0.2908611 -0.04591363)
      ConditionalPathPoint P3: femur_l (0.04052523 -0.4524008 -0.02301294)
          socket_coordinate=/jointset/knee_l/knee_angle_l range=(-2.61799 -1.21004)
      ConditionalPathPoint P4: femur_l (0.02840134 -0.4763118 -0.02065552)
          socket_coordinate=/jointset/knee_l/knee_angle_l range=(-2.61799 -1.92004)
      MovingPathPoint P5: tibia_l socket_x_coordinate=/jointset/knee_l/knee_angle_l
          socket_y_coordinate=/jointset/knee_l/knee_angle_l socket_z_coordinate=/jointset/knee_l/knee_angle_l
        x_location: MultiplierFunction: scale=1.033443
          SimmSpline: x=(-2.0944 -1.99997 -1.5708 -1.45752 -1.39626 -1.0472 -0.698132 -0.526391 -0.349066 -0.174533 0 0.00017453 0.00034907 0.0279253 0.0872665 0.174533 2.0944)
              y=(0.0142897 0.016703 0.0262145 0.0283623 0.0294674 0.0352709 0.0408785 0.0437291 0.0469704 0.0518742 0.0599557 0.0599647 0.0599738 0.0614577 0.0650351 0.0711867 0.0583766)
        y_location: MultiplierFunction: scale=1.033443
          SimmSpline: x=(-2.0944 -1.99997 -1.5708 -1.45752 -1.39626 -1.0472 -0.698132 -0.526391 -0.349066 -0.174533 0 0.00017453 0.00034907 0.0279253 0.0872665 0.174533 2.0944)
              y=(0.0215318 0.0218815 0.0232362 0.0234019 0.0234371 0.0230439 0.0223842 0.0220151 0.0216359 0.0210971 0.0195864 0.0195842 0.019582 0.01919 0.018008 0.0151073 -0.0653421)
        z_location: MultiplierFunction: scale=1.033443
          SimmSpline: x=(-2.0944 2.0944) y=(-0.0165 -0.0165)
    Thelen2003Muscle med_gas_l: max_isometric_force=1558 optimal_fiber_length=0.06216448 tendon_slack_length=0.4040691
        pennation_angle_at_optimal=0.296706
      PathPoint P1: femur_l (-0.02132907 -0.4410627 0.02638069)
      ConditionalPathPoint P2: femur_l (-0.03367748 -0.4515027 0.02896263)
          socket_coordinate=/jointset/knee_l/knee_angle_l range=(-0.785398 0.174533)
      PathPoint P3: calcn_l (0 0.03298108 0.005638701)
    Thelen2003Muscle lat_gas_l: max_isometric_force=683 optimal_fiber_length=0.06626344 tendon_slack_length=0.3934392
        pennation_angle_at_optimal=0.1396263
      PathPoint P1: femur_l (-0.02469682 -0.4429711 -0.03053425)
      ConditionalPathPoint P2: femur_l (-0.03367748 -0.4510537 -0.03075876)
          socket_coordinate=/jointset/knee_l/knee_angle_l range=(-0.785398 0.174533)
      PathPoint P3: calcn_l (0 0.03298108 0.005638701)
    Thelen2003Muscle soleus_l: max_isometric_force=3549 optimal_fiber_length=0.05176957 tendon_slack_length=0.2588479
        pennation_angle_at_optimal=0.4363323
      PathPoint P1: tibia_l (-0.002480263 -0.1584268 -0.007337445)
      PathPoint P2: calcn_l (0 0.03298108 0.005638701)
    Thelen2003Muscle tib_post_l: max_isometric_force=1588 optimal_fiber_length=0.03216057 tendon_slack_length=0.3216057
        pennation_angle_at_optimal=0.2094395
      PathPoint P1: tibia_l (-0.009714364 -0.1393081 -0.001963542)
      PathPoint P2: tibia_l (-0.01488158 -0.4186477 0.02366584)
      PathPoint P3: calcn_l (0.04436487 0.03553445 0.03042771)
      PathPoint P4: calcn_l (0.08213353 0.0169161 0.02989575)
    Thelen2003Muscle flex_dig_l: max_isometric_force=310 optimal_fiber_length=0.03562497 tendon_slack_length=0.4191173
        pennation_angle_at_optimal=0.1221731
      PathPoint P1: tibia_l (-0.008577576 -0.2114424 0.001860197)
      PathPoint P2: tibia_l (-0.01591502 -0.4186477 0.02025548)
      PathPoint P3: calcn_l (0.04638629 0.03351303 0.02978936)
      PathPoint P4: calcn_l (0.07532453 0.01872474 0.02798072)
      PathPoint P5: calcn_l (0.1763956 -0.008617637 -0.01234131)
      PathPoint P6: toes_l (-0.002021421 -0.008298465 -0.01563942)
      PathPoint P7: toes_l (0.03032132 -0.007553731 -0.02287398)
      PathPoint P8: toes_l (0.04691825 -0.006383435 -0.02574652)
    Thelen2003Muscle flex_hal_l: max_isometric_force=322 optimal_fiber_length=0.04510742 tendon_slack_length=0.3986237
        pennation_angle_at_optimal=0.1745329
      PathPoint P1: tibia_l (-0.008164199 -0.2412056 -0.02521601)
      PathPoint P2: tibia_l (-0.01922204 -0.4215414 0.01798191)
      PathPoint P3: calcn_l (0.03979008 0.0293638 0.02564013)
      PathPoint P4: calcn_l (0.1104334 0.00723456 0.02723599)
      PathPoint P5: calcn_l (0.1836301 -0.005638701 0.02861907)
      PathPoint P6: toes_l (0.01649054 -0.006808997 0.0281935)
      PathPoint P7: toes_l (0.05979151 -0.01085184 0.0192567)
    Thelen2003Muscle tib_ant_l: max_isometric_force=905 optimal_fiber_length=0.1018405 tendon_slack_length=0.2317391
        pennation_angle_at_optimal=0.08726646
      PathPoint P1: tibia_l (0.01849863 -0.1678311 -0.01188459)
      PathPoint P2: tibia_l (0.03400027 -0.4083133 0.01829194)
      PathPoint P3: calcn_l (0.1240514 0.01893752 0.03244913)
    Thelen2003Muscle per_brev_l: max_isometric_force=435 optimal_fiber_length=0.05195122 tendon_slack_length=0.1672829
        pennation_angle_at_optimal=0.08726646
      PathPoint P1: tibia_l (-0.007234101 -0.273449 -0.0335869)
      PathPoint P2: tibia_l (-0.02046217 -0.4323925 -0.02924643)
      PathPoint P3: tibia_l (-0.01488158 -0.4438637 -0.0298665)
      PathPoint P4: calcn_l (0.05010996 0.02872546 -0.02478901)
      PathPoint P5: calcn_l (0.07202642 0.02329954 -0.03649197)
    Thelen2003Muscle per_long_l: max_isometric_force=943 optimal_fiber_length=0.05106831 tendon_slack_length=0.3595626
        pennation_angle_at_optimal=0.1745329
      PathPoint P1: tibia_l (0.0005167215 -0.1620439 -0.03741063)
      PathPoint P2: tibia_l (-0.02139227 -0.4345628 -0.02955647)
      PathPoint P3: tibia_l (-0.01674178 -0.446344 -0.0298665)
      PathPoint P4: calcn_l (0.04659908 0.02446983 -0.02351232)
      PathPoint P5: calcn_l (0.07245199 0.0112774 -0.03021493)
      PathPoint P6: calcn_l (0.09064478 0.00734095 -0.01255409)
      PathPoint P7: calcn_l (0.1279879 0.0090432 0.01957587)
    Thelen2003Muscle per_tert_l: max_isometric_force=180 optimal_fiber_length=0.08223377 tendon_slack_length=0.1040934
        pennation_angle_at_optimal=0.2268928
      PathPoint P1: tibia_l (0.001033443 -0.2897774 -0.02387253)
      PathPoint P2: tibia_l (0.02366584 -0.4205079 -0.01643174)
      PathPoint P3: calcn_l (0.09117673 0.02425705 -0.03181078)
    Thelen2003Muscle ext_dig_l: max_isometric_force=512 optimal_fiber_length=0.1065568 tendon_slack_length=0.3604128
        pennation_angle_at_optimal=0.1396263
      PathPoint P1: tibia_l (0.003307017 -0.1427185 -0.02852302)
      PathPoint P2: tibia_l (0.0298665 -0.4141006 -0.007440789)
      PathPoint P3: calcn_l (0.09809212 0.04127955 0.0001063906)
      PathPoint P4: calcn_l (0.1719272 0.005851482 -0.01383078)
      PathPoint P5: toes_l (0.0003191717 0.005000357 -0.01627776)
      PathPoint P6: toes_l (0.04713103 -0.0004255623 -0.02659765)
    Thelen2003Muscle ext_hal_l: max_isometric_force=162 optimal_fiber_length=0.1161172 tendon_slack_length=0.3190607
        pennation_angle_at_optimal=0.1047198
      PathPoint P1: tibia_l (0.001240132 -0.1826094 -0.0235625)
      PathPoint P2: tibia_l (0.03369024 -0.411827 0.008784265)
      PathPoint P3: calcn_l (0.1031989 0.04138594 0.02244841)
      PathPoint P4: calcn_l (0.137563 0.03287469 0.02734238)
      PathPoint P5: calcn_l (0.1844813 0.01478829 0.02978936)
      PathPoint P6: toes_l (0.03170439 0.004362014 0.02606569)
      PathPoint P7: toes_l (0.0598979 0.00361728 0.01978865)
    Thelen2003Muscle ercspn_r: max_isometric_force=2500 optimal_fiber_length=0.1295995 tendon_slack_length=0.03239988
        pennation_angle_at_optimal=0
      PathPoint P1: pelvis (-0.1501743 0.04709037 0.04676857)
      PathPoint P2: torso (-0.05953934 0.1190787 0.02608905)
    Thelen2003Muscle ercspn_l: max_isometric_force=2500 optimal_fiber_length=0.1295995 tendon_slack_length=0.03239988
        pennation_angle_at_optimal=0
      PathPoint P1: pelvis (-0.1501743 0.04709037 -0.04676857)
      PathPoint P2: torso (-0.05953934 0.1190787 -0.02608905)
    Thelen2003Muscle intobl_r: max_isometric_force=900 optimal_fiber_length=0.10793 tendon_slack_length=0.10793
        pennation_angle_at_optimal=0
      PathPoint P1: pelvis (-0.04290694 0.07508715 0.1241083)
      PathPoint P2: torso (0.07577734 0.1732053 0.016238)
    Thelen2003Muscle intobl_l: max_isometric_force=900 optimal_fiber_length=0.10793 tendon_slack_length=0.10793
        pennation_angle_at_optimal=0
      PathPoint P1: pelvis (-0.04290694 0.07508715 -0.1241083)
      PathPoint P2: torso (0.07577734 0.1732053 -0.016238)
    Thelen2003Muscle extobl_r: max_isometric_force=900 optimal_fiber_length=0.1293309 tendon_slack_length=0.1508861
        pennation_angle_at_optimal=0
      PathPoint P1: pelvis (-0.03218021 -0.06822204 0.01072674)
      PathPoint P2: torso (0.07036467 0.1190787 0.1190787)
    Thelen2003Muscle extobl_l: max_isometric_force=900 optimal_fiber_length=0.1293309 tendon_slack_length=0.1508861
        pennation_angle_at_optimal=0
      PathPoint P1: pelvis (-0.03218021 -0.06822204 -0.01072674)
      PathPoint P2: torso (0.07036467 0.1190787 -0.1190787)
    ObjectGroup R_hip_abd: members=(glut_max1_r glut_med1_r glut_med2_r glut_med3_r glut_min1_r glut_min2_r glut_min3_r peri_r sar_r tfl_r)
    ObjectGroup R_hip_flex: members=(add_brev_r add_long_r glut_med1_r glut_min1_r grac_r iliacus_r pect_r psoas_r rect_fem_r sar_r tfl_r)
    ObjectGroup R_hip_inrot: members=(glut_med1_r glut_min1_r iliacus_r psoas_r tfl_r)
    ObjectGroup R_hip_exrot: members=(gem_r glut_med3_r glut_min3_r peri_r quad_fem_r)
    ObjectGroup R_hip_ext: members=(add_long_r add_mag1_r add_mag2_r add_mag3_r bifemlh_r glut_max1_r glut_max2_r glut_max3_r glut_med3_r glut_min3_r semimem_r semiten_r)
    ObjectGroup R_hip_add: members=(add_brev_r add_long_r add_mag1_r add_mag2_r add_mag3_r bifemlh_r grac_r pect_r semimem_r semiten_r)
    ObjectGroup R_knee_bend: members=(bifemlh_r bifemsh_r grac_r lat_gas_r med_gas_r sar_r semimem_r semiten_r)
    ObjectGroup R_knee_ext: members=(rect_fem_r vas_int_r vas_lat_r vas_med_r)
    ObjectGroup R_ankle_pf: members=(flex_dig_r flex_hal_r lat_gas_r med_gas_r per_brev_r per_long_r soleus_r tib_post_r)
    ObjectGroup R_inverter: members=(ext_hal_r flex_dig_r flex_hal_r tib_ant_r tib_post_r)
    ObjectGroup R_ankle_df: members=(ext_dig_r ext_hal_r per_tert_r tib_ant_r)
    ObjectGroup R_everter: members=(ext_dig_r per_brev_r per_long_r per_tert_r)
    ObjectGroup L_hip_abd: members=(glut_max1_l glut_med1_l glut_med2_l glut_med3_l glut_min1_l glut_min2_l glut_min3_l peri_l sar_l tfl_l)
    ObjectGroup L_hip_flex: members=(add_brev_l add_long_l glut_med1_l glut_min1_l grac_l iliacus_l pect_l psoas_l rect_fem_l sar_l tfl_l)
    ObjectGroup L_hip_inrot: members=(glut_med1_l glut_min1_l iliacus_l psoas_l tfl_l)
    ObjectGroup L_hip_exrot: members=(gem_l glut_med3_l glut_min3_l peri_l quad_fem_l)
    ObjectGroup L_hip_ext: members=(add_long_l add_mag1_l add_mag2_l add_mag3_l bifemlh_l glut_max1_l glut_max2_l glut_max3_l glut_med3_l glut_min3_l semimem_l semiten_l)
    ObjectGroup L_hip_add: members=(add_brev_l add_long_l add_mag1_l add_mag2_l add_mag3_l bifemlh_l grac_l pect_l semimem_l semiten_l)
    ObjectGroup L_knee_bend: members=(bifemlh_l bifemsh_l grac_l lat_gas_l med_gas_l sar_l semimem_l semiten_l)
    ObjectGroup L_knee_ext: members=(rect_fem_l vas_int_l vas_lat_l vas_med_l)
    ObjectGroup L_ankle_pf: members=(flex_dig_l flex_hal_l lat_gas_l med_gas_l per_brev_l per_long_l soleus_l tib_post_l)
    ObjectGroup L_inverter: members=(ext_hal_l flex_dig_l flex_hal_l tib_ant_l tib_post_l)
    ObjectGroup L_ankle_df: members=(ext_dig_l ext_hal_l per_tert_l tib_ant_l)
    ObjectGroup L_everter: members=(ext_dig_l per_brev_l per_long_l per_tert_l)
    ObjectGroup back_ext: members=(ercspn_l ercspn_r)
    ObjectGroup back_rlb: members=(ercspn_r extobl_r intobl_r)
    ObjectGroup back_introt: members=(ercspn_r extobl_l intobl_r)
    ObjectGroup back_llb: members=(ercspn_l extobl_l intobl_l)
    ObjectGroup back_extrot: members=(ercspn_l extobl_r intobl_l)
    ObjectGroup back_flex: members=(extobl_l extobl_r intobl_l intobl_r)
  MarkerSet:
    Marker RFemur1: femur_r (-0.009706785 -0.1711667 0.1249373)
    Marker RFemur2: femur_r (0.05414996 -0.1641109 0.1145018)
    Marker RFemur3: femur_r (0.06292136 -0.2672473 0.0935423)
    Marker RFemur6: femur_r (0.007874153 -0.4601003 0.06815589)
    Marker RFemur5: femur_r (0.01651071 -0.4542931 -0.04882714)
    Marker RShank1: tibia_r (-0.025308 -0.2232708 0.08346707)
    Marker RShank2: tibia_r (0.02940022 -0.2250947 0.06177946)
    Marker RShank3: tibia_r (0.02826197 -0.3057219 0.04518968)
    Marker RShank4: tibia_r (-0.02725876 -0.3080345 0.06887101)
    Marker RShank6: tibia_r (-0.0060848 -0.425411 0.04132397)
    Marker RShank5: tibia_r (-0.003283502 -0.408976 -0.04296308)
    Marker RFoot1: calcn_r (0.1240406 0.03525639 0.05838552)
    Marker RFoot4: calcn_r (0.1977667 0.01767724 0.05932523)
    Marker RFoot3: calcn_r (0.2051168 0.01860616 -0.05557374)
    Marker LFemur2: femur_l (0.0193344 -0.182455 -0.1101776)
    Marker LFemur1: femur_l (0.08219279 -0.1761935 -0.08755674)
    Marker LFemur3: femur_l (0.0213923 -0.2849186 -0.09780296)
    Marker LFemur6: femur_l (0.00663877 -0.4546525 -0.07951702)
    Marker LFemur5: femur_l (0.02038431 -0.4558802 0.0515938)
    Marker LShank2: tibia_l (-0.04562135 -0.2048252 -0.08356298)
    Marker LShank1: tibia_l (0.0154535 -0.2077334 -0.08665949)
    Marker LShank4: tibia_l (0.01243319 -0.2894082 -0.07344525)
    Marker LShank3: tibia_l (-0.0472931 -0.2884534 -0.06899864)
    Marker LShank6: tibia_l (-0.006354682 -0.4243762 -0.04293662)
    Marker LShank5: tibia_l (-0.006496324 -0.410863 0.03961808)
    Marker LFoot2: calcn_l (0.1288764 0.03757416 -0.0570084)
    Marker LFoot3: calcn_l (0.2080437 0.02181949 -0.05496816)
    Marker LFoot4: calcn_l (0.2077378 0.01572145 0.05748084)
    Marker Hip1: pelvis (-0.1533362 0.1438509 -0.02942722)
    Marker Hip2: pelvis (-0.148516 0.1442327 0.05312729)
    Marker Hip4: pelvis (-0.2185752 0.04648001 -0.01672736)
    Marker RHumerus1: humerus_r (-0.0817797 -0.1631053 -0.0285036)
    Marker RHumerus2: humerus_r (-0.05193398 -0.154909 0.02455872)
    Marker RHumerus3: humerus_r (-0.03090959 -0.2303703 0.02214621)
    Marker RElbow1: radius_r (-0.03903352 -0.1059623 -0.03065871)
    Marker RElbow2: radius_r (-0.02364757 -0.09868027 0.02475576)
    Marker RElbow3: radius_r (-0.01872125 -0.1752096 0.03649741)
    Marker Sternum1: torso (0.1597614 0.3012142 0.05150234)
    Marker Sternum2: torso (0.1636972 0.3073305 -0.02768004)
    Marker Sternum3: torso (0.1887604 0.2014591 -0.02016315)
    Marker Head1: head (-0.03083505 0.2710056 0.04738646)
    Marker Head2: head (-0.09248922 0.136573 0.04617495)
    Marker Head3: head (-0.01561937 0.1589338 -0.09575336)
    Marker LHumerus2: humerus_l (-0.07491131 -0.1498613 -0.01105888)
    Marker LHumerus1: humerus_l (-0.02654978 -0.1417322 -0.04125311)
    Marker LHumerus3: humerus_l (-0.06302235 -0.2249504 -0.005964156)
    Marker LElbow3: radius_l (-0.03073919 -0.1660143 0.02678576)
    Marker RFoot5: calcn_r (-0.02087408 0.03337416 -0.005089334)
    Marker LFoot5: calcn_l (-0.02047737 0.03400034 0.01425029)
    Marker RFoot6: calcn_r (0.2520142 0.02460009 -0.01458332)
    Marker LFoot6: calcn_l (0.2530887 0.0252441 0.01595278)
    Marker Hip5: pelvis (0.009057346 -0.006404995 0.1371177)
    Marker Hip6: pelvis (0.00315653 -0.008946078 -0.1297803)
    Marker Sternum7: torso (-0.07191001 0.4767567 0.0006522542)
    Marker Sternum5: torso (-0.009908518 0.4365963 0.2137785)
    Marker Sternum6: torso (-0.01050112 0.4416715 -0.2204084)
    Marker RHumerus5: humerus_r (-0.01007824 -0.3402697 -0.0778323)
    Marker RHumerus6: humerus_r (-0.03091102 -0.3349759 -0.02030589)
    Marker LHumerus5: humerus_l (-0.02701858 -0.3352457 0.07049767)
    Marker LHumerus6: humerus_l (0.006479527 -0.3079075 -0.03856445) fixed=true
    Marker RElbow5: ulna_r (-0.02018922 -0.27403 0.005122172)
    Marker RElbow6: radius_r (-0.007233869 -0.2438453 0.05574525)
    Marker LElbow5: ulna_l (-0.02141449 -0.2655208 -0.003998482)
    Marker LElbow6: radius_l (-0.007519419 -0.2459134 -0.05843259)
    Marker RFemur4: femur_r (-0.002766207 -0.2693328 0.1063166)
    Marker LFemur4: femur_l (0.0831239 -0.2793029 -0.07727818)
    Marker Hip3: pelvis (-0.2151994 0.04859488 0.05215946)
    Marker Sternum4: torso (0.183508 0.1977915 0.04777308)
    Marker RHumerus4: humerus_r (-0.06252735 -0.2378373 -0.02639756)
    Marker LHumerus4: humerus_l (-0.01491641 -0.2199264 -0.03610088)
    Marker RElbow4: radius_r (-0.03444585 -0.1866472 -0.02060999)
    Marker LElbow4: radius_l (-0.01711863 -0.1567809 -0.03281025)
    Marker Head4: head (0.003766646 0.2359559 -0.08312148)
    Marker LFoot1: calcn_l (0.13133 0.03815715 0.0615137)
    Marker RFoot2: calcn_r (0.1309429 0.03761599 -0.05718571)
    Marker LElbow1: radius_l (-0.02668881 -0.07874628 -0.0170271)
    Marker LElbow2: radius_l (-0.03553542 -0.09481097 0.04381673)
